import Sofa
import pouf

from pouf import rigid
from pouf import tool
from pouf import script
from pouf.tool import concat
from pouf import quat
import math

mesh_path = pouf.path() + '/share/mesh'

import pouf.plot


import numpy as np

class Script:


    def reset( self ):
        self.count = 0

    def onEndAnimationStep(self, dt):
        every = int(0.05 / dt)

        if self.count % every == 0:
            radius = 0.02
            mass = 4/3 * math.pi * (radius * radius * radius)
            ball(self.node, [0, 1, 0], mass, radius)
        self.count += 1
        # return 0

        data = {}
        cv = [ x[0] for x in self.qp.convergence if x[0] > 0]


        if len(cv) > 0:
            last = int(cv[-1])

            dynamics = cv[-(last + 1):-1]
            correction = cv[0:-(last + 2)]

            data['dynamics'] = (range(len(dynamics)), dynamics)
            data['correction'] = (range(len(correction)), correction)

            pouf.plot.draw( data )


def box(pos, mass = 1):
    b = pouf.rigid.Body()
    b.collision = mesh_path + '/cube.obj'
    b.mass = mass
    b.inertia = [mass, mass, mass]
    b.dofs.translation = pos
    return b

def ball(node, pos, mass, radius = 0.5):

    res = node.createChild('ball')

    res.createObject('MechanicalObject', template = "Vec3d", position = concat(pos) )
    res.createObject('UniformMass', tempalte = 'Vec3d', mass = mass)
    res.createObject('SphereModel', radius = radius)

    return res

def stack(node, n):
    for i in range(n):
        box([0, 1 + 1.5 * i, 0]).insert( node )


def bowl(pos):
    b = pouf.rigid.Body()
    b.collision = Sofa.src_dir() + '/share/mesh/SaladBowl.obj'
    b.mass_from_mesh( b.collision )
    b.dofs.translation = pos
    b.dofs.rotation = pouf.quat.exp( [-math.pi / 2, 0, 0] )
    b.scale = [1, 1, 1]
    return b


def createScene(node):
    scene = pouf.tool.scene( node )

    # node.createObject('RequiredPlugin',
    #                   pluginName = 'CompliantDev' )

    num = node.createObject('pouf.qp',
                            iterations = 100,
                            precision = 1e-8,
                            schur = True,
                            filename = '/tmp/lcp')

    node.createObject('LDLTResponse', regularize = 0)

    ode = node.getObject('ode')
    ode.stabilization = True
    ode.stabilization_damping = 1e-3

    proximity = node.getObject('proximity')
    proximity.alarmDistance = 0.008
    proximity.contactDistance = 0.005

    manager = node.getObject('manager')

    manager.response = 'CompliantResponse'
    manager.responseParams = 'damping=0&compliance=0&restitution=0'

    ground = pouf.tool.ground(scene, [0, 1, 0], [0.1, 0.1, 0.1] )


    # stack(scene, 20)


    bowl([0, 0.1, 0]).insert(scene)

    script = Script()
    script.qp = num
    script.node = node

    pouf.script.insert( node, script )
